F := 4.7  # Тяговая сила ленты [кН]
V := 0.60  # Скорость грузовой цепи [м/с]
t := 100  # Шаг грузовой цепи [мм]
z := 7  # Число зубьев звездочки
L_r := 7  # Срок службы привода [лет]
L_с := 1  # Сменность работы
t_c := 6  # Продолжительность смены [ч]
# Расчет параметров двигателя
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N_р.м. := F*V = 2.82  # Требуемая мощность рабочей машины
η_з.п. := (0.93 + 0.95)/2  # КПД закрытой передачи;
η_о.п. := (0.92 + 0.94)/2  # открытой передачи
η_м. := 0.98  # муфты
η_п.к. := (0.99 + 0.995)/2  # одной пары подшипников качения
η := η_з.п.*η_о.п.*η_м.*η_п.к.^3 = 0.837584  # Общий КПД привода
N_р.д. := N_р.м./η = 3.36683  # Расчетная мощность двигателя [кВт]
# Выбранный двигатель:
# ТИП : АИР112МВ6
P := 4  # Номинальная мощность [кВт]
n_ном := 950  # Номинальная частота вращения [об/мин]
η_д := 83.4  # КПД [%]
# Определение передаточного отношения привода
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n_р.о. := 60*1000*V/(z*t) = 51.4286  # Частота вращения приводного вала рабочей машины [об/мин]
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u := n_ном/n_р.о. = 18.4722  # Передаточное отношение привода
u_з.п. := 4.5  # Передаточное отношение закрытой передачи
u_о.п. := u/u_з.п. = 4.10494  # Передаточное отношение открытой передачи
# Кинематический расчет привода
# Определение силовых и кинематических параметров привода:
# (Б) - быстроходный вал двигателя
# (Т) - тихоходный вал двигателя
# (PO) - вал рабочего органа
# Мощность N, кВт
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# Двигателя
N_д := P = 4
Б
N_1 := N_д*η_м.*η_п.к. = 3.8906
Т
N_2 := N_1*η_з.п.*η_п.к. = 3.62974
РО
N_РО := N_2*η_о.п.*η_п.к. = 3.35034
# Частота вращения n, мин^-1
# Двигателя
n_ном = 950
Б
n_1 := n_ном = 950
Т
n_2 := n_1/u_з.п. = 211.111
РО
n_РО := n_2/u_о.п. = 51.4286
# Угловая скорость ω, c^-^1
# Двигателя
ω_ном := π*n_ном/30 = 99.4838
Б
ω_1 := ω_ном = 99.4838
Т
ω_2 := ω_1/u_з.п. = 22.1075
РО
ω_РО := ω_2/u_о.п. = 5.38559
# Вращающий момент T, Н*м
# Двигателя
T_д := N_д*10^3/ω_ном = 40.2076
Б
T_1 := T_д*η_м.*η_п.к. = 39.1079
Т
T_2 := T_1*u_з.п.*η_з.п.*η_п.к. = 164.186
РО
T_РО := T_2*u_о.п.*η_о.п.*η_п.к. = 622.093
# Проектирование зубчатой цилиндрической передачи
n_2 = 211.111
T_2 = 164.186
n_РО = 51.4286
T_РО = 622.093
# Для изготовления колеса и шестерни выбираем сравнительно недорогой материал – сталь 20Х
HRC_min := 56  # Твердость поверхности
HRC_max := 63
HRC_avr := (HRC_min + HRC_max)/2 = 59.5
σ_В := 650  # Предел прочности [МПа]
σ_Т := 400  # Предел текучести [МПа]
# Расчет напряжений
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# Твердость колеса должна быть меньше чем твердость шестерни
# Для шестерни
HRC_m1 := 60
HB_m1 := 650
# Для колеса
HRC_m2 := 58
HB_m2 := 620
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σ_Hlim1 := 23*HRC_m1 = 1380  # Предел контактной выносливости для шестерни [МПа]
σ_Hlim2 := 23*HRC_m2 = 1334  # Предел контактной выносливости для колеса [МПа]
# Расчет коэффициента долговечности
S_H := 1.2  # Коэффициент безопасности
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N_HG1 := 30*HB_m1^2.4 = 169088204  # Базовое число циклов шестерни
N_HG2 := 30*HB_m2^2.4 = 150959799  # Колеса
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K_D := 255  # Количество рабочих дней в году
L_r = 7  # Срок службы
L_с = 1  # Количество смен
t_c = 6  # Продолжительность смены
t_р.п := L_r*K_D*L_с*t_c = 10710  # Ресурс работы передачи в часах
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μ_H := 0.18  # Коэффициент режима работы
c := 1  # Кол. колес находящихся в зацеплении с данным
N_НЕ1 := μ_H*60*c*n_2*t_р.п = 24418800  # Эквивалентное число циклов шестерни
N_НЕ2 := μ_H*60*c*n_РО*t_р.п = 5948640  # Колеса
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Z_N1 := nthroot(N_HG1/N_НЕ1, 6) = 1.38059  # Коэффициент долговечности шестерни
Z_N2 := nthroot(N_HG2/N_НЕ2, 6) = 1.71425  # Колеса
# Допускаемое контактное напряжение шестерни
σ_H1 := σ_Hlim1/S_H*Z_N1 = 1587.68
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σ_H2 := σ_Hlim2/S_H*Z_N2 = 1905.67  # Колеса
σ_Hm := (σ_H1 + σ_H2)/2 = 1746.68  # Среднее допускаемое напряжение
σ_Hmin := σ_H1 = 1587.68  # Меньшее из σ_H1 и σ_H2
σ_Hп := 1.25*σ_Hmin = 1984.6  # Предельные контактные напряжения
σ_H := σ_Hm = 1746.68  # Окончательное (меньшее из σ_Hm и σ_Hп)
# Расчет допускаемого напряжения изгиба
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σ_Flim1 := 800  # Предел выносливости по напряжению изгиба шестерни
σ_Flim2 := 800  # колеса
m_F := 9
N_FG := 4*10^6  # базовое число циклов для всех сталей
μ_F1 := 0.036  # коэффициент режима работы (напряжение изгиба)
# Эквивалентное число циклов
# шестерни | колеса
N_FE1 := μ_F1*60*c*n_2*t_р.п = 4883760
N_FE2 := μ_F1*60*c*n_РО*t_р.п = 1189728
# Коэффициент долговечности
# шестерни
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# колеса
Y_N1 := nthroot(N_FG/N_FE1, m_F) = 0.978064
Y_N1 := 1
Y_N2 := nthroot(N_FG/N_FE2, m_F) = 1.14423
S_F := 1.55  # Коэффициент безопасности
Y_A := 1  # Коэффициент влияния 2-сторонней нагрузки
# Допускаемое напряжение изгиба [МПа]
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# шестерни | колеса
σ_F1 := σ_Flim1/S_F*Y_A*Y_N1 = 516.129
σ_F2 := σ_Flim2/S_F*Y_A*Y_N2 = 590.569
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# Максимальные допускаемые контактные напряжения [МПа]
# шестерни | колеса
σ_Hmax1 := 44*HRC_m1 = 2640
σ_Hmax2 := 44*HRC_m2 = 2552
# Максимальные допускаемые напряжения изгиба
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Y_Nmax := 2.5  # коэффициент долговечности
K_st := 1.2  # коэффициент учета частоты приложения пиковой нагрузки
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σ_Fmax1 := 0.5*σ_Flim1*Y_Nmax*K_st = 1200  # шестерни
σ_Fmax2 := 0.5*σ_Flim2*Y_Nmax*K_st = 1200  # колеса
# Проектный расчет цилиндрической прямозубой передачи
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# Формула(2.48)
u_о.п. = 4.10494  # Передаточное число требуемое от передачи
T_РО = 622.093  # Момент требуемый на колесе[Н*м]
E_np := 2.1*10^5  # Приведенный модуль упругости [МПа]
σ_H = 1746.68  # Контактное напряжение
Ψ_ba := (0.15 + 0.2)/2 = 0.175  # Коэффициент ширины колеса относительно межосевого расстояния
Ψ_bdmax := (0.45 + 0.55)/2 = 0.5  # Табл(2.7)
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# Формула(2.17)
Ψ_bd := 0.5*Ψ_ba*(u_о.п. + 1) = 0.446682  # Коэффициент ширины колеса относительно делительного диаметра
# Рис(2.4)
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K_Hβ := 1.03
C := 0.06  # Коэффициент твердости и типа зубьев
n_ст := 9  # Степень точности изготовления колес (5-9)
# Формула(2.32)
# Допускаемое контактное напряжение
K_Hα := 1 + C*(n_ст - 5) = 1.24
# Межосевое расстояние[мм]
a_w := 0.85*(u_о.п. + 1)*nthroot(E_np*T_РО*10^3*K_Hα*K_Hβ/(σ_H^2*u_о.п.*Ψ_ba), 3) = 183.907
a_w := 180  # Округляем межосевое расстояние до ближайшего стандартного Табл(2.2)
b_w := a_w*Ψ_ba = 31.5  # Ширена зубчатых колес по формуле(2.49)
b_w1 := b_w + 6.5 = 38  # Ширена Шестерни (добавляется 5-10 мм)
b_w2 := b_w = 31.5  # Ширена Колеса
Ψ_m := (20 + 15)/2 = 17.5  # Табл(2.8)
m := b_w/Ψ_m = 1.8  # Модуль передачи по формуле(2.19)(принимаем стандартный модуль 2)
m := 2
z_Δ := 2*a_w/m = 180  # Суммарное количество зубьев по формуле(2.50)
z_1 := z_Δ/(u_о.п. + 1) = 35.26  # Количество зубьев Шестерни
z_2 := z_Δ - z_1 = 144.74  # Количество зубьев Колеса
z_1 := 35
z_2 := 145  # Округляем
# Нахождение погрешности
u_о.п. = 4.10494
z_2/z_1 = 4.14286
z_2/z_1*(u_о.п./100)^-1 = 100.924  # Погрешность <5% так что все хорошо
d_1 := m*z_1 = 70  # Делительный диаметр шестерни
d_2 := m*z_2 = 290  # Делительный диаметр колеса
# Проверочные расчеты цилиндрической прямозубой передачи
β := 0  # Угол наклона зубьев =0 т.к. передача прямозубая
ε_a := (0.95 - 1.6*(1/z_1 + 1/z_2))*(1 + cos(β))*cos(β) = 1.7865  # Коэффициент перекрытия по формуле(2.28)
ε_β := b_w*sin(β)/(π*m) = 0  # Коэффициент осевого перекрытия по формуле(2.29)
Z_Hβ := sqrt(cos(β)^2/ε_a) = 0.748166  # По формуле(2.30)
n_ст = 9  # Степень точности изготовления колес (5-9)
C = 0.06  # Коэффициент твердости и типа зубьев
K_Ha := 1 + C*(n_ст - 5) = 1.24  # Коэффициент распределения нагрузки между зубьями по формуле(2.32)
v := π*d_1*10^-3*n_1/60 = 3.48193  # Окружная скорость[м/с] по формуле(2.33)
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K_Hv := 1.5  # По табл(В.1)
K_H := K_Ha*K_Hβ*K_Hv = 1.9158  # Коэффициент расчетной нагрузки по формуле(2.31)
E_np = 210000
# Шестерни | Колеса
b_w := 20
b_w1 = 38
b_w2 = 31.5
b_w1 := b_w + 8 = 28
b_w2 := b_w = 20
σ_H = 1746.68  # Контактное напряжение рассчитанное до
a' := 20
σ_H.пр := 1.18*Z_Hβ + sqrt(E_np*T_2*10^3*K_H/(d_1^2*b_w*sin(2*a'°))*((u_о.п. + 1)/u_о.п.)) = 1142.83  # по формуле(2.27)
Δ_σH := (σ_H.пр - σ_H)/σ_H*100 = -34.5709  # Перегрузка(недогрузка)
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# по формуле(2.1)стр 33
F_t := 2*T_2/(d_1*10^-3) = 4691.02
x_1 := 0
x_2 := 0
F_r := F_t*tan(a_w°)/cos(β) = -5.74465e-13
F_a := F_t*tan(β) = 0
z_v1 := z_1/cos(β)^3 = 35
z_v2 := z_2/cos(β)^3 = 145
# шестерня | колесо
Y_FS1 := 3.82
Y_FS2 := 3.75  # По рис(2.6)
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σ_F1/Y_FS1 = 135.112
σ_F2/Y_FS2 = 157.485
# Дальнейший расчет ведем по шестерне тк это соотношение меньше
σ_F := σ_F1 = 516.129
Y_FS := Y_FS1 = 3.82
Y_β := 1 - β°/100 = 1
Y_Fβ := Y_β/ε_a = 0.559753
K_Fa := K_Ha = 1.24
K_Fβ := 1.04
Ψ_bd = 0.446682  # По рис(2.7)
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K_Fv := K_Hv = 1.5
K_F := K_Fa*K_Fβ*K_Fv = 1.9344
σ_F = 516.129  # Рассчитанное до напряжение изгиба
σ_F.пр := F_t*K_F*Y_FS*Y_Fβ/(b_w*m) = 485.08  # Напряжение изгиба
Δ_σF := (σ_F.пр - σ_F)/σ_F*100 = -6.01578  # Небольшая недогрузка так что все хорошо
K_П := 2  # Допускаемая перегрузка передачи
σ_Hmax1 = 2640
σ_Hmax2 = 2552
σ_Hmax := σ_H.пр*sqrt(K_П) = 1616.21  # Т.к. меньше 2 верхних все рассчитано верно
σ_Fmax1 = 1200
σ_Fmax2 = 1200
σ_Fmax := σ_F.пр*K_П = 970.16  # Т.к. меньше 2 верхних все рассчитано верно
# Расчет геометрии передачи и оформление результатов расчета
h_a := 1  # Коэффициент высоты головки зуба
Δy := 0  # Коэффициент уравнительного смещения
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x_1 = 0
x_2 = 0
c_z := 0.25  # Коэффициент радиального зазора
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# Диаметры вершин зубьев [мм]
# шестерни | колеса
d_a1 := d_1 + 2*m*(h_a + x_1 - Δy) = 74
d_a2 := d_2 + 2*m*(h_a + x_2 - Δy) = 294
# Диаметры впадин зубьев [мм]
# шестерни | колеса
d_f1 := d_1 - 2*m*(h_a + c_z - x_1) = 65
d_f2 := d_2 - 2*m*(h_a + c_z - x_2) = 285
# Шестерня | Колесо
# Число зубьев z:
z_1 = 35
z_2 = 145
# Модуль m:
m = 2
# Фактическое передаточное число u=z_2/z_1:
z_2/z_1 = 4.14286
# Делительный диаметр d:
d_1 = 70
d_2 = 290
# Диаметр вершин d_a:
d_a1 = 74
d_a2 = 294
# Диаметр впадин d_f:
d_f1 = 65
d_f2 = 285
# Коэффициент смещения:
x_1 = 0
x_2 = 0
# Межосевое расстояние
a_w = 180
# Ширена
b_w1 = 28
b_w2 = 20
# Проектирование валов
τ := 14.5
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# Табл(8.1)
d_1cp := nthroot(T_2*10^3/(0.2*τ), 3) = 38.3983
d_1cp := 40  # Вал для шестерни [мм]
d_2cp := nthroot(T_РО*10^3/(0.2*τ), 3) = 59.8622
d_2cp := 60  # Вал для колеса
# Проектирование шпонок
σ_cm1 := 4*T_2*10^3/(h*l_p*d)  # error: Эта переменная не определена. Проверьте правильность установки обозначения.
