F := 3500  # кН
V := 0.65  # м/c
z := 8
p := 100  # мм
t_c := 10  # ч
L := 4  # лет
K_s := 1
K_D := 255
# Мощность на приводном валу
N_р.м. := F*V = 2275
# КПД привода
η_о.п. := 0.95  # кпд открытой передачи
η_з.п. := 0.97  # кпд закрытой передачи
η_м. := 0.98  # кпд муфты
η_п.к. := 0.99  # кпд пары подшипников качения
η := η_п.к.*η_п.к.*η_п.к.*η_м.*η_о.п.*η_з.п. = 0.876248
# Желаемая мощность
N_р.д. := N_р.м./η = 2596.3  # Выбран двигатель АИР112МА6
# Частота вращения приводного вала
n_р.о. := 60*1000*V/(z*p) = 48.75
n_двиг := 950
P_двиг := 3000
u := n_двиг/n_р.о. = 19.4872
u_о.п. := 5
u_з.п. := u/u_о.п. = 3.89744
# Мощности на валах привода | Частоты вращения валов привода
n_ном := n_двиг
N_д := P_двиг = 3000
n_1 := n_ном/u_о.п. = 190
N_1 := N_д*η_о.п.*η_п.к. = 2821.5
N_2 := N_1*η_з.п.*η_п.к. = 2709.49
n_2 := n_1/u_з.п. = 48.75
N_PO := N_2*η_м.*η_п.к. = 2628.74
n_в.р.о. := n_2 = 48.75
# Угловые скорости вращения валов привода | Вращающие моменты на валах привода
ω_ном := π*n_ном/30
T_д := N_д/ω_ном = 30.1557
ω_1 := ω_ном/u_о.п. = 19.8968
T_1 := T_д*u_о.п.*η_о.п.*η_п.к. = 141.807
ω_2 := ω_1/u_з.п. = 5.10509
T_2 := T_1*u_з.п.*η_з.п.*η_п.к. = 530.742
ω_РО := ω_2 = 5.10509
T_РО := T_2*η_м.*η_п.к. = 514.926
table  # each column defines a variable
    Номер_вала | Мощность_P_j (Вт) | Частота_вращения_n_j (мин^-1) | Угловая_скорость_ω_j (c^-1) | Вращающий_момент_T_j (Н*м)
    1 | 3000 | 950 | 99.484 | 30.156
    2 | 2821.5 | 190 | 19.897 | 141.807
    3 | 2709.486 | 48.75 | 5.105 | 530.742
    4 | 2628.744 | 48.75 | 5.105 | 514.926
    □ | □ | □ | □ | □
end table
S_H := 1.2  # Коэффициент безопасности (цементация)
HRC_1 := 60
HB_1 := 650  # Предел контактной выносливости для шестерни [МПа]
HRC_2 := 58
HB_2 := 620  # Предел контактной выносливости для колеса [МПа]
# Предел контактной выносливости для шестерни и колеса
σ_Hlim1 := 23*HRC_1 = 1380
σ_Hlim2 := 23*HRC_2 = 1334
N_HG1 := 30*HB_1^2.4 = 169088204
N_HG2 := 30*HB_2^2.4 = 150959799
# Ресурс работы передачи в часах
t_Σ := L*K_D*K_s*8 = 8160
μ_H := 0.125  # (легкий)
c := 1  # количество колес, находящихся в зацеплении с данным колесом
# Эквивалентное число циклов для шестерни и колеса
N_HE1 := μ_H*60*c*n_1*t_Σ = 11628000
N_HE2 := μ_H*60*c*n_2*t_Σ = 2983500
# Коэффициенты долговечности для шестерни и колеса соответственно
Z_N1 := nthroot(N_HG1/N_HE1, 6) = 1.56231
Z_N2 := nthroot(N_HG2/N_HE2, 6) = 1.92319
Z_N2 := 1.8
# Допускаемые контактные напряжения для шестерни и колеса
σ_H1 := σ_Hlim1/S_H*Z_N1 = 1796.66  # МПа
σ_H2 := σ_Hlim2/S_H*Z_N2 = 2001  # МПа
# Предельные значения допускаемых контактных напряжений для конических передач
σ_Hmin := min(σ_H1, σ_H2) = 1796.66  # МПа
σ_Hn := 1.25*σ_Hmin = 2245.82  # МПа
# Среднее допускаемое напряжение
σ_Hm := (σ_H1 + σ_H2)/2 = 1898.83  # МПа
σ_H := min(σ_Hm, σ_Hn) = 1898.83  # МПа
# Допускаемые напряжения изгиба
σ_Flim1 := 800
σ_Flim2 := 800
μ_F1 := 0.016
μ_F2 := 0.016
m_F := 9
N_FG := 4*10^6
# Эквивалентное число циклов перемены напряжений изгиба для шестерни и колеса
N_FE1 := μ_F1*60*c*n_1*t_Σ = 1488384
N_FE2 := μ_F2*60*c*n_2*t_Σ = 381888
# Коэффициенты долговечности для шестерни и колеса
Y_N1 := nthroot(N_FG/N_FE1, m_F) = 1.1161
Y_N2 := nthroot(N_FG/N_FE2, m_F) = 1.29822
# Допускаемые напряжения изгиба для шестерни и колеса
S_F := 1.55
Y_A := 1
σ_F1 := σ_Flim1/S_F*Y_A*Y_N1 = 576.054  # МПа
σ_F2 := σ_Flim2/S_F*Y_A*Y_N2 = 670.047  # МПа
σ_Hmax1 := 44*HRC_1 = 2640  # МПа
σ_Hmax2 := 44*HRC_2 = 2552  # МПа
# Максимальные допускаемые контактные напряжения
Y_Nmax := 2.5
K_st := 1.2
σ_Fmax1 := 0.5*σ_Flim1*Y_Nmax*K_st = 1200  # МПа
σ_Fmax2 := 0.5*σ_Flim2*Y_Nmax*K_st = 1200  # МПа
# Проектный расчет цилиндрической косозубой передачи
K_d := 680
u := u_з.п. = 3.89744
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Ψ_ba := 0.25
Ψ_bd := 0.5*Ψ_ba*(u + 1) = 0.612179
K_Hβ := 1.05
d := K_d*nthroot(T_1*K_Hβ/(σ_H^2*Ψ_bd)*((u + 1)/u), 3) = 29.8711  # мм
b_w := d*Ψ_bd = 18.2865  # мм
b_w := 34  # мм
bw_2 := b_w = 34  # мм
Ψ_m := 20  # мм  # коэффициент модуля
b_w1 := b_w + 5 = 39  # мм
m_n := b_w/Ψ_m = 1.7  # мм
m_n := 1.75
ε_β := 1.1  # -  коэффициент осевого перекрытия
β' := asin(ε_β*π*m_n/b_w) = 0.178821  # рад
β'° := β'*180/π = 10.2457  # °
z'_1 := d*cos(β')/m_n = 16.797  # число зубьев шестерни
z_1 := 19
u = 3.89744
z_min := 17
z_2 := z_1*u = 74.0513
z_2 := 74
u := z_2/z_1 = 3.89474
# Коэффициенты смещения шестерни х1 и колеса х2
x_1 := 0
x_2 := x_1 = 0
a'_w := m_n*(z_2 + z_1)/(2*cos(β')) = 82.6936  # межосевое расстояние, мм
a_w := 85
β := acos(m_n*(z_2 + z_1)/(2*a_w)) = 0.2931  # угол наклона зубьев
β° := β*180/π = 16.7934
# Делительные диаметры шестерни и колеса
d_1 := m_n*z_1/cos(β) = 34.7312
d_2 := m_n*z_2/cos(β) = 135.269
# Проверочные расчеты цилиндрической косозубой передачи
E_np := 2.1*10^5  # МПа
σ_Hп ≤ [σ_H]
ε_a := (0.95 - 1.6*(1/z_1 + 1/z_2))*(1 + cos(β))*cos(β) = 1.58187
ε_βп := b_w*sin(β)/(π*m_n) = 1.78678
ε_βп ≥ ε_β
1.787 ≥ 1.1
Z_Hβ := sqrt(cos(β)^2/ε_a) = 0.761179
C := 0.15  # коэффициент твердости и типа зубьев
n_ст := 7  # степень точности изготовления колес
K_Ha := 1 + C*(n_ст - 5) = 1.3
K_Hαп := 1.6
K_Hα ≤ K_Hαп
v := π*d_1*n_1/(60*1000) = 0.345519  # м/c
K_Hv := 1
K_H := K_Ha*K_Hβ*K_Hv = 1.365
σ_Hnew := 1.18*Z_Hβ*sqrt(E_np*T_1*10^3*K_H/(d_1^2*b_w*sin(2*20°))*((u + 1)/u)) = 1250.34
σ_Hnew ≤ σ_H
1250*МПа < 1899*МПа
Δ_σH := (σ_Hnew - σ_H)/σ_H*100 = -34.1523
F_t := 2*T_1/(d_1*10^-3) = 8165.98  # Н
F_r := F_t*tan(20°)/cos(β) = 3104.57  # Н
F_a := F_t*tan(β) = 2464.42  # Н
z_v1 := z_1/cos(β)^3 = 21.654
z_1 = 19
z_v2 := z_2/cos(β)^3 = 84.3365
z_2 = 74
# Смещение для шестерни и колеса
Y_FS1 := 4.1
Y_FS2 := 3.74
# Для шестерни и для колеса находим отношение Y_FS/[σ_F]
σ_F1/Y_FS1 = 140.501
σ_F2/Y_FS2 = 179.157
# Дальнейший расчет ведем по шестерни, т. к. данное соотношение меньше. То есть принимаем
Y_FS := Y_FS1 = 4.1
σ_F := σ_F1 = 576.054
Y_β := 1 - β°/100 = 0.832066
Y_Fβ := Y_β/ε_a = 0.526003
Y_Fβ := 0.7
K_Fa := K_Ha = 1.3
K_Fβ := 1.05
K_Kv := 1
K_F := K_Fa*K_Fβ*K_Kv = 1.365
σ_Fnew := F_t*K_F*Y_FS*Y_Fβ/(b_w*m_n) = 537.658
σ_Fnew < σ_F1
537.658 < 576.054
Δ_σF := (σ_Fnew - σ_F)/σ_F*100 = -6.66543
K_П := 2
σ_Hmax1 = 2640
σ_Hmax := σ_Hnew*sqrt(K_П) = 1768.24
σ_Fmax1 = 1200
σ_Fmax := σ_F*K_П = 1152.11
σ_Fmax2 = 1200
# Расчет геометрии передачи и оформление результатов расчета
h'_a := 1
Δy := 0
m := m_n = 1.75
с := 0.25
d_a1 := d_1 + 2*m_n*(h'_a + x_1 - Δy) = 38.2312
d_a2 := d_2 + 2*m_n*(h'_a + x_2 - Δy) = 138.769
d_f1 := d_1 - 2*m_n*(h'_a + с - x_1) = 30.3562
d_f2 := d_2 - 2*m_n*(h'_a + с - x_2) = 130.894
table  # each column defines a variable
    Параметр | Шестерня | Колесо
    "Число зубьев z" | 20 | 78
    "Модуль m, мм" | 1 | 1
    "Фактическое передаточное число " | 3.897 | 3.897
    "Угол наклона зубьев β°" | 18.195 | 18.195
    "Делительный диаметр d, мм" | 36.735 | 143.265
    "Диаметр вершин da,мм" | 40.235 | 146.765
    "Диаметр впадин df, мм" | 32.36 | 138.89
    "Ширина зубчатого венца bw, мм" | 34 | 29
    "Коэффициент смещения x" | 0 | 0
    "Межосевое расстояние aw, мм" | 90 | 90
end table
# Проектирование цилиндрической прямозубой передачи
z_1n := 25
Ψ_mn := 20
n_cm := 7
β := 0
C_n := 0.06
u := u_о.п. = 5
z_2n := z_1n*u = 125
K_Han := 1 + C_n*(n_cm - 5) = 1.12
K_Fan := K_Han = 1.12
z_v1n := z_1n/cos(β)^3 = 25
Y_FS1n := 3.98
z_v2n := z_2n/cos(β)^3 = 125
Y_FS2n := 3.75
Ψ_ba = 0.25
Ψ_bd = 0.612179
K_Fβn := K_Fβ = 1.05
Y_Fβn := 1
K_m := 3
σ_F1/Y_FS1n = 144.737
σ_F2/Y_FS2n = 178.679
nthroot(K_m*T_2*10^3*K_Fan*K_Fβ*Y_FS1n*Y_Fβ/(z_1n*Ψ_mn*σ_F1), 3) = 2.62615
m ≥ nthroot(K_m*T_2*10^3*K_Fan*K_Fβ*Y_FS1n*Y_Fβ/(z_1n*Ψ_mn*σ_F1), 3)
m ≥ 2.626
m := 3
d_1n := m*z_1n = 75
d_2n := m*z_2n = 375
b_wn := d_1n*Ψ_bd = 45.9135
b_wn := 46
a'_w := m*(z_2n + z_1n)/(2*cos(β)) = 225  # межосевое расстояние, мм
ε_an := (0.95 - 1.6*(1/z_1n + 1/z_2n))*(1 + cos(β))*cos(β) = 1.7464
ε_βn := b_wn*sin(β)/(π*m) = 0
Z_Hβn := sqrt(cos(β)^2/ε_an) = 0.756708
v_n := π*d_1n*n_2/(60*1000) = 0.191441
K_Hvn := 1
K_Hn := K_Han*K_Hβ*K_Hv = 1.176
σ_Hnewn := 1.18*Z_Hβn*sqrt(E_np*T_2*1000*K_Hn/(d_1n^2*b_wn*sin(2*20°))*((u + 1)/u)) = 868.324
Δ_σH := (σ_Hnewn - σ_H)/σ_H*100 = -54.2706
F_tn := 2*T_2/(d_1n*10^-3) = 14153.1
F_rn := F_tn*tan(20°)/cos(β) = 5151.32
F_an := F_t*tan(β) = 0  # Н
Y_FSn := Y_FS1n = 3.98
σ_F := σ_F1 = 576.054
K_Fvn := 1
K_Fn := K_Fan*K_Fβn*K_Fvn = 1.176
σ_Fn := F_tn*K_Fn*Y_FSn*Y_Fβn/(b_wn*m) = 480.025
Δ_σFn := (σ_Fn - σ_F)/σ_F*100 = -16.6702
K_П := 2
σ_Hmax1 = 2640
σ_Hmaxn := σ_Hnewn*sqrt(K_П) = 1228
σ_Fmax1 = 1200
σ_Fmaxn := σ_Fn*K_П = 960.05
σ_Fmax2 = 1200
# Расчет геометрии передачи и оформление результатов расчета
h'_a := 1
Δy := 0
m := m = 3
с := 0.25
d_a1 := d_1n + 2*m*(h'_a + x_1 - Δy) = 81
d_a2 := d_2n + 2*m*(h'_a + x_2 - Δy) = 381
d_f1 := d_1n - 2*m*(h'_a + с - x_1) = 67.5
d_f2 := d_2n - 2*m*(h'_a + с - x_2) = 367.5
table  # each column defines a variable
    Параметр | Шестерня | Колесо
    "Число зубьев z" | 25 | 125
    "Модуль m, мм" | 3 | 3
    "Фактическое передаточное число " | 5 | 5
    "Угол наклона зубьев β°" | 0 | 0
    "Делительный диаметр d, мм" | 75 | 375
    "Диаметр вершин da,мм" | 81 | 381
    "Диаметр впадин df, мм" | 67.5 | 367.5
    "Ширина зубчатого венца bw, мм" | 51 | 46
    "Коэффициент смещения x" | 0 | 0
    "Межосевое расстояние aw, мм" | 225 | 225
end table
